OpenVSP model (file version 4), 13 components.
Geometry view with OpenVSP parameter names; values to 6 digits, angles in degrees, lengths in the model's unit.
Overall bounding box: X_Min=0 X_Len=292.161 Y_Min=-125.268 Y_Len=250.535 Z_Min=0 Z_Len=159.992

Blank "Datum"
  location (X Y Z) 100 0 100, rotation 0 0 0

Wing "WingGeom", child of "Datum"
  location (X Y Z) 100 0 100, rotation 0 0 0; relative location 0 0 0, rotation 0 0 0
  symmetric about XZ
  bounding box size 44.7385 250.535 4.47558
  totals: TotalSpan=250.535 TotalProjectedSpan=250.535 TotalChord=31.3169 TotalArea=7846 TotalAR=8
  root: chord 44.7385, twist 0, NACA 4-series Camber=0 CamberLoc=0.2 ThickChord=0.1
  sections:
    n  Span     Root_Chord  Tip_Chord  Area  Sweep  Sweep_Location  Dihedral  Twist  Twist_Location  tip airfoil
    1  125.268  44.7385     17.8954    3923  0      1               0         0      0.25            as above

Blank "BlankGeom", child of "Datum"
  location (X Y Z) 129.543 0 100, rotation 0 0 0; relative location 29.5429 0 0, rotation 0 0 0

Stack "Boom", child of "BlankGeom"
  location (X Y Z) 41.1183 55.7304 93.8312, rotation 0 0 0; relative location -88.4246 55.7304 -6.16875, rotation 0 0 0
  symmetric about XZ
  bounding box size 233.84 122.741 11.28
  cross sections:
    n  XDelta  YDelta  ZDelta  shape
    0  0       0       0       point
    1  16.92   0       0       ellipse Ellipse_Height=11.28 Ellipse_Width=11.28
    2  200     0       0       as above
    3  16.92   0       0       point

Wing "VertTail", child of "Boom"
  location (X Y Z) 230.674 55.7304 98.0613, rotation 90 0 0; relative location 0 0 -1.41, rotation 90 0 0
  symmetric about XZ
  bounding box size 60.9641 115.791 60.6052
  totals: TotalSpan=121.21 TotalProjectedSpan=121.21 TotalChord=34.6316 TotalArea=4197.71 TotalAR=3.5
  root: chord 43.2894, twist 0, NACA 4-series Camber=0 CamberLoc=0.2 ThickChord=0.1
  sections:
    n  Span     Root_Chord  Tip_Chord  Area     Sweep  Sweep_Location  Dihedral  Twist  Twist_Location  tip airfoil
    1  60.6052  43.2894     25.9737    2098.85  30     0               0         0      0.25            as above

Wing "HTail", child of "VertTail"
  location (X Y Z) 265.665 -55.7304 158.666, rotation 0 0 0; relative location 0 -111.461 0, rotation 0 0 0
  symmetric about XZ
  bounding box size 26.4962 111.461 2.65065
  totals: TotalSpan=111.461 TotalProjectedSpan=111.461 TotalChord=26.4962 TotalArea=2953.3 TotalAR=4.20667
  root: chord 26.4962, twist 0, NACA 4-series Camber=0 CamberLoc=0.2 ThickChord=0.1
  sections:
    n  Span     Root_Chord  Tip_Chord  Area     Sweep  Sweep_Location  Dihedral  Twist  Twist_Location  tip airfoil
    1  55.7304  26.4962     26.4962    1476.65  0      0               0         0      0.25            as above

Custom "Disk", child of "Boom"
  location (X Y Z) 59.1488 55.7304 105.111, rotation 0 90 0; relative location 0 0 5.64, rotation 0 90 0
  symmetric about XZ
  bounding box size 67.7 179.161 0
  Design: Diameter=67.7
  custom script Disk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

Propeller "HoverProps", child of "Disk"
  location (X Y Z) 59.1488 55.7304 105.111, rotation 0 90 0; relative location 0 0 0, rotation 0 0 0
  symmetric about XZ
  bounding box size 6.57276 179.274 3.45888
  Design: Diameter=67.7 NumBlade=2 Beta34=20 UseBeta34Flag=1 Feather=0 Rotate=0 ReverseFlag=0 FoldAngle=0 AF=151.538 ConstructXoC=0.5
  cross sections:
    n  RadiusFrac  shape
    0  0.2         circle Circle_Diameter=2.708
    1  0.45        NACA 4-series Camber=0.05 CamberLoc=0.4 Chord=6.10953 ThickChord=0.12
    2  0.7         NACA 4-series Camber=0.05 CamberLoc=0.4 Chord=6.77 ThickChord=0.05
    3  1           NACA 4-series Camber=0.01 CamberLoc=0.4 Chord=4.4005 ThickChord=0.03
  Chord along r/R (cubic Bezier): 0.2: 0.08, 0.333333: 0.15, 0.466667: 0.2, 0.6: 0.2, 0.716667: 0.2, 0.833333: 0.2, 0.95: 0.2, 0.966667: 0.2, 0.983333: 0.2, 1: 0.13
  Twist along r/R (PCHIP): 0.2: 46.75, 0.75: 20, 1: 13

Custom "Disk", child of "Boom"
  location (X Y Z) 185.531 55.7304 105.111, rotation 0 90 0; relative location 0 0 5.64, rotation 0 90 0
  symmetric about XZ
  bounding box size 67.7 179.161 0
  Design: Diameter=67.7
  custom script Disk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

Propeller "HoverProps", child of "Disk"
  location (X Y Z) 185.531 55.7304 105.111, rotation 0 90 0; relative location 0 0 0, rotation 0 0 0
  symmetric about XZ
  bounding box size 6.57276 179.274 3.45888
  Design: Diameter=67.7 NumBlade=2 Beta34=20 UseBeta34Flag=1 Feather=0 Rotate=0 ReverseFlag=0 FoldAngle=0 AF=151.538 ConstructXoC=0.5
  cross sections:
    n  RadiusFrac  shape
    0  0.2         circle Circle_Diameter=2.708
    1  0.45        NACA 4-series Camber=0.05 CamberLoc=0.4 Chord=6.10953 ThickChord=0.12
    2  0.7         NACA 4-series Camber=0.05 CamberLoc=0.4 Chord=6.77 ThickChord=0.05
    3  1           NACA 4-series Camber=0.01 CamberLoc=0.4 Chord=4.4005 ThickChord=0.03
  blade curves as in "HoverProps"

Stack "Fuselage", child of "Datum"
  location (X Y Z) 44.6154 0 80.3826, rotation 0 0 0; relative location -55.3846 0 -19.6174, rotation 0 0 0
  bounding box size 193.405 28.2 45.12
  cross sections:
    n  XDelta   YDelta  ZDelta  shape
    0  0        0       0       point
    1  35.1344  0       0       rounded rectangle RoundRectXSec_Radius=5.64 RoundedRect_Height=45.12 RoundedRect_Width=28.2
    2  56.539   0       0       as above
    3  101.732  0       0       point

Custom "Disk", child of "Fuselage"
  location (X Y Z) 213.849 6.85487e-05 80.3826, rotation 0 0 0; relative location -24.1714 0 0, rotation 0 0 0
  bounding box size 0 67.7 67.7
  Design: Diameter=67.7
  custom script Disk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

Propeller "CruiseProp", child of "Disk"
  location (X Y Z) 213.849 6.85487e-05 80.3826, rotation 0 0 0; relative location 0 0 0, rotation 0 0 0
  bounding box size 3.45888 67.8127 6.57276
  Design: Diameter=67.7 NumBlade=2 Beta34=20 UseBeta34Flag=1 Feather=0 Rotate=0 ReverseFlag=0 FoldAngle=0 AF=151.538 ConstructXoC=0.5
  cross sections:
    n  RadiusFrac  shape
    0  0.2         circle Circle_Diameter=2.708
    1  0.45        NACA 4-series Camber=0.05 CamberLoc=0.4 Chord=6.10953 ThickChord=0.12
    2  0.7         NACA 4-series Camber=0.05 CamberLoc=0.4 Chord=6.77 ThickChord=0.05
    3  1           NACA 4-series Camber=0.01 CamberLoc=0.4 Chord=4.4005 ThickChord=0.03
  blade curves as in "HoverProps"

Parameter links (A drives B)
  Disk:Design:Diameter -> HoverProps:Design:Diameter Offset=0
  Disk:Design:Diameter -> CruiseProp:Design:Diameter Offset=0
  VertTail:XForm:Y_Location -> HTail:XSec_1:Span Offset=0
